a_п := 78  # Длина помещения, м
b_п := 48  # Ширина помещения, м
h_п := 10  # Высота помещения, м
# Геометрический объем помещения Vп равен:
V_п := 35551.3  # Объем помещения, м^3
# Согласно примечанию 2 и 4 к табл.1 принимается, что строительные конструкции и оборудование занимают 20% геометрического объема помещения, причем 60% занимают крупногабаритные строительные конструкции и оборудование, а 40% - малогабаритные
# Свободный объём помещения Vсв рассчитывается по формуле:
V_св := V_п*(1 - 0.01*20) = 28441  # Свободный объем помещения, м^3
# В помещении в аварийной ситуации может образовываться метановоздушная горючая смесь. Давление и температура в помещении до воспламенения горючей смеси принимаются равными
p_0 := 101.3  # Начальное давление, кПа
T_0 := 25  # Начальная температура, С
# Коэффициент степени заполнения объема помещения горючей смесью и участия ее во взрыве
μ_v := 1
# Характеристики горючей смеси принимаются по данными таблици прил. 2:
ε_pmax := 7.6
U_нmax := 0.28  # м/с
ρ_НКПР := 1.15  # кг/м^3
ε_рнкпр := 5
ρ_max := 1.13  # кг/м^3
ε_снкпр := 6  # степень сжатия продуктов горения  при взрыве в замкнутом объеме с концентрацией горючего, соответсвующей НКПР
ε_cmax := 9.1  # степень сжатия продуктов горения при взрыве в замкнутом объеме с концентрацией горючего, соответсвующей Uнmax
# Расчетные характеристики ГС вычисляются по соотвествующим формулам.
# Расчетная нормальная скорость распростанения пламени определяется по формуле:
U_нр := U_нmax*0.55 = 0.154  # м/с
# Расчетная плотность газа в помещении перед воспламенением смеси определяется по формуле:
ρ_0 := (0.5367*μ_v*(ρ_НКПР + ρ_max) + (1 - μ_v)*1.294)/(1 + 0.00367*T_0) = 1.12084  # кг/м^3
# Расчетная степень сжатия продуктов горения при взрыве в замкнутом объеме определяется по формуле:
ε_c := 0.5*(ε_cmax + ε_снкпр) = 7.55
# Исходя из условий (10)-(12) опредеяем, что
V_пл := 0.5*μ_v*V_п*(ε_рнкпр + ε_pmax) = 223973  # объем пламени, м^3
# Так как Vпл > Vп, значит V=Vп
V := 35551.3  # м^3
# Показатель интенсификации взрывного горения α определяется линейной интерполяцией по табл. 1 в зависимости от степени загроможденности помещения строительными конструкциями и оборудованием Θз и объема V, в котором происходить горение взрывоопасной смеси.
# Для малогабаритных строительных конструкций и оборудования при Θз=20%
α_м := 18 + (30 - 18)*(35551.3 - 10000)/(100000 - 10000) = 21.4068
# Для крупногабаритных строительных конструкций и оборудования при Θз=20%
α_к := 10 + (20 - 10)*(35551.3 - 10000)/(100000 - 10000) = 12.839
# Для 60% крупногабаритных и 40% малогабаритных строительных конструкций и оборудования:
α := 0.6*α_к + 0.4*α_м = 16.2662
# Допустимое избыточное давление в помещении принимается равным
ΔP_доп := 5  # кПа
# В соответсвии с формулами (14)-(16) коэффициент
β_μ := 1
# Коэффициет Кф, учитывающий влияние формы помещения и эффект истечения продуктов горения взрывоопасной смеси определяется по формуле (17):
К_ф := 0.5*(b_п^2 + h_п^2)/nthroot(V_п^2, 3) = 1.11173
# Требуемая площадь открытых проемов в наружном ограждении взрывоопасного помещения, при которой избыточное давление в нем при взрывном горении ГС не превысит ΔPдоп, определяется по формуле (2):
S_откр.тр := 0.105*U_нр*α*(ε_c - 1)*β_μ*К_ф*sqrt(ρ_0)*nthroot(V_св^2, 3)/sqrt(ΔP_доп) = 844.93  # м^2
# В качестве ЛСК для снижения избыточного давления взрыва в помещении рассматривается оконный переплет, показанный на рис.4.
# Принимается, что для застекления оконных проёмов используется стекло толщиной 3мм. Остекление одинарное
# Расчетные размеры стекол рассчитываются по следующим формулам:
a_ст := 0.9 + 3*0.003 = 0.909  # , м
b_ст := 1.2 + 3*0.003 = 1.209  # , м
# Площадь стекла рассчитывается по следующией формуле:
S_ст := a_ст*b_ст = 1.09898  # , м^2
# Коэффициент λст рассчитывается по следующей формуле:
λ_ст := a_ст/b_ст = 0.751861
# Коэффициенты Ksh и Kλ расчитываются линейной интерполяцией с помощью табл.4 и табл.5 рекомендации расчет параметров легкосбрасываемых конструкций.
K_sh := 0.37 + ((0.32 - 0.37)*(1.099 - 1)/(1.2 - 1)) = 0.34525
K_λ := 1 + ((1.01 - 1)*(0.752 - 0.7)/(0.8 - 0.7)) = 1.0052
# Значение приведенного давления вскрытия оконного остекления ΔPдоп рассчитывается по формуле:
ΔP_доп := 5  # , кПа
ΔP_доп.прив. := ΔP_доп/(K_sh*K_λ) = 14.4073  # , кПа
# Коэффициент вскрытия одинарного остекления определяется линейной интерполяцией по табл. 2
K_вскр1ост. := 0.886 + ((0.915 - 0.886)*(14.407 - 14)/(15 - 14)) = 0.897803
# Таким образом, площадь ЛСК в наружном ограждении помещения определяется по следующей формуле:
S_ЛСК := S_откр.тр/K_вскр1ост. = 941.108  # , м^2
# Фактическая площадь ЛСК должна быть больше, чем значение Sлск.
