a_п := 84.72  # Длина помещения, м
b_п := 24  # Ширина помещения, м
h_п := 17.63  # Высота помещения, м
# Геометрический объем помещения Vп равен:
V_п := 37420  # Объем помещения, м^3
# Согласно примечанию 2 и 4 к табл.1 принимается, что строительные конструкции и оборудование занимают 20% геометрического объема помещения, причем 60% занимают крупногабаритные строительные конструкции и оборудование, а 40% - малогабаритные
# Свободный объём помещения Vсв рассчитывается по формуле:
V_св := V_п*(1 - 0.01*20) = 29936  # Свободный объем помещения, м^3
# В помещении в аварийной ситуации может образовываться пропановоздушная горючая смесь. Давление и температура в помещении до воспламенения горючей смеси принимаются равными
p_0 := 101.3  # Начальное давление, кПа
T_0 := 20  # Начальная температура, С
# Коэффициент степени заполнения объема помещения горючей смесью и участия ее во взрыве
μ_v := 1
# Характеристики горючей смеси принимаются по данными таблици прил. 2:
ε_pmax := 8.1
U_нmax := 0.45  # м/с
ρ_НКПР := 1.15  # кг/м^3
ε_рнкпр := 5.1
ρ_max := 1.13  # кг/м^3
ε_снкпр := 6.1  # степень сжатия продуктов горения  при взрыве в замкнутом объеме с концентрацией горючего, соответсвующей НКПР
ε_cmax := 9.7  # степень сжатия продуктов горения при взрыве в замкнутом объеме с концентрацией горючего, соответсвующей Uнmax
# Расчетные характеристики ГС вычисляются по соотвествующим формулам.
# Расчетная нормальная скорость распростанения пламени определяется по формуле:
U_нр := U_нmax*0.55 = 0.2475  # м/с
# Расчетная плотность газа в помещении перед воспламенением смеси определяется по формуле:
ρ_0 := (0.5367*μ_v*(ρ_НКПР + ρ_max) + (1 - μ_v)*1.294)/(1 + 0.00367*T_0) = 1.14  # кг/м^3
# Расчетная степень сжатия продуктов горения при взрыве в замкнутом объеме определяется по формуле:
ε_c := 0.5*(ε_cmax + ε_снкпр) = 7.9
# Исходя из условий (10)-(12) опредеяем, что
V_пл := 0.5*μ_v*V_п*(ε_рнкпр + ε_pmax) = 246972  # объем пламени, м^3
# Так как Vпл > Vп, значит V=Vп
V := 37420  # м^3
# Показатель интенсификации взрывного горения α определяется линейной интерполяцией по табл. 1 в зависимости от степени загроможденности помещения строительными конструкциями и оборудованием Θз и объема V, в котором происходить горение взрывоопасной смеси.
# Для малогабаритных строительных конструкций и оборудования при Θз=20%
α_м := 18 + (30 - 18)*(37420 - 10000)/(100000 - 10000) = 21.656
# Для крупногабаритных строительных конструкций и оборудования при Θз=20%
α_к := 10 + (20 - 10)*(37420 - 10000)/(100000 - 10000) = 13.0467
# Для 60% крупногабаритных и 40% малогабаритных строительных конструкций и оборудования:
α := 0.6*α_к + 0.4*α_м = 16.4904
# Допустимое избыточное давление в помещении принимается равным
ΔP_доп := 5  # кПа
# В соответсвии с формулами (14)-(16) коэффициент
β_μ := 1
# Коэффициет Кф, учитывающий влияние формы помещения и эффект истечения продуктов горения взрывоопасной смеси определяется по формуле (16):
К_ф := 0.5*(b_п^2 + h_п^2)/nthroot(V_п^2, 3) = 0.39634
# Требуемая площадь открытых проемов в наружном ограждении взрывоопасного помещения, при которой избыточное давление в нем при взрывном горении ГС не превысит ΔPдоп, определяется по формуле (2):
S_откр.тр := 0.105*U_нр*α*(ε_c - 1)*β_μ*К_ф*sqrt(ρ_0)*nthroot(V_св^2, 3)/sqrt(ΔP_доп) = 539.522  # м^2
# В качестве ЛСК для снижения избыточного давления взрыва в помещении рассматривается оконный переплет показан на рис.2.
# Принимается, что для застекления оконных проёмов используется стекло толщиной 4мм. Остекление одинарное
# Расчетные размеры стекол рассчитываются по следующим формулам:
a_ст := 1.2 + 3*0.004 = 1.212  # , м
b_ст := 1.4 + 3*0.004 = 1.412  # , м
# Площадь стекла рассчитывается по следующией формуле:
S_ст := a_ст*b_ст = 1.71134  # , м^2
# Коэффициент λст рассчитывается по следующей формуле:
λ_ст := a_ст/b_ст = 0.858357
# Коэффициенты Ksh и Kλ расчитываются линейной интерполяцией с помощью табл.4 и табл.5 рекомендации расчет параметров легкосбрасываемых конструкций.
K_sh := 0.375 + ((0.335 - 0.375)*(1.711 - 1.6)/(1.8 - 1.6)) = 0.3528
K_λ := 1.01 + ((1.06 - 1.01)*(0.858 - 0.8)/(0.9 - 0.8)) = 1.039
# Значение приведенного давления вскрытия оконного остекления ΔPдоп рассчитывается по формуле:
ΔP_доп := 5  # , кПа
ΔP_доп.прив. := ΔP_доп/(K_sh*K_λ) = 13.6404
# Коэффициент вскрытия одинарного остекления определяется линейной интерполяцией по табл. 2
K_вскр1ост. := 0.837 + ((0.886 - 0.837)*(13.64 - 13)/(14 - 13)) = 0.86836
# Таким образом, площадь ЛСК в наружном ограждении помещения определяется по следующей формуле:
S_ЛСК := S_откр.тр/K_вскр1ост. = 621.312  # , м^2
# Фактическая площадь ЛСК должна быть больше, чем значение Sлск.
