a_п := 24  # Длина помещения, м
b_п := 11.75  # Ширина помещения, м
h_п := 7.7  # Высота помещения, м
# Геометрический объем помещения Vп равен:
V_п := 2170.6  # Объем помещения, м^3
# Согласно примечанию 2 и 4 к табл.1 принимается, что строительные конструкции и оборудование занимают 20% геометрического объема помещения, причем 60% занимают крупногабаритные строительные конструкции и оборудование, а 40% - малогабаритные
# Свободный объём помещения Vсв рассчитывается по формуле:
V_св := V_п*(1 - 0.01*20) = 1736.48  # Свободный объем помещения, м^3
# В помещении в аварийной ситуации может образовываться взрывоопасная горючая смесь толуола с воздухом. Давление и температура в помещении до воспламенения горючей смеси принимаются равными
p_0 := 101.3  # Начальное давление, кПа
T_0 := 20  # Начальная температура, С
# Коэффициент степени заполнения объема помещения горючей смесью и участия ее во взрыве
μ_v := 1
# Характеристики горючей смеси принимаются по данными таблици прил. 2:
ε_pmax := 8.3
U_нmax := 0.39  # м/с
ρ_НКПР := 1.21  # кг/м^3
ε_рнкпр := 5.1
ρ_max := 1.24  # кг/м^3
ε_снкпр := 6.1  # степень сжатия продуктов горения  при взрыве в замкнутом объеме с концентрацией горючего, соответсвующей НКПР
ε_cmax := 10  # степень сжатия продуктов горения при взрыве в замкнутом объеме с концентрацией горючего, соответсвующей Uнmax
# Расчетные характеристики ГС вычисляются по соотвествующим формулам.
# Расчетная нормальная скорость распростанения пламени определяется по формуле:
U_нр := U_нmax*0.55 = 0.2145  # м/с
# Расчетная плотность газа в помещении перед воспламенением смеси определяется по формуле:
ρ_0 := (0.5367*μ_v*(ρ_НКПР + ρ_max) + (1 - μ_v)*1.294)/(1 + 0.00367*T_0) = 1.225  # кг/м^3
# Расчетная степень сжатия продуктов горения при взрыве в замкнутом объеме определяется по формуле:
ε_c := 0.5*(ε_cmax + ε_снкпр) = 8.05
# Исходя из условий (10)-(12) опредеяем, что
V_пл := 0.5*μ_v*V_п*(ε_рнкпр + ε_pmax) = 14543  # объем пламени, м^3
# Так как Vпл > Vп, значит V=Vп
V := 2170.6  # м^3
# Показатель интенсификации взрывного горения α определяется линейной интерполяцией по табл. 1 в зависимости от степени загроможденности помещения строительными конструкциями и оборудованием Θз и объема V, в котором происходить горение взрывоопасной смеси.
# Для малогабаритных строительных конструкций и оборудования при Θз=20%
α_м := 10 + (18 - 10)*(2170.6 - 1000)/(10000 - 1000) = 11.0405
# Для крупногабаритных строительных конструкций и оборудования при Θз=20%
α_к := 6 + (10 - 6)*(2170.6 - 1000)/(10000 - 1000) = 6.52027
# Для 60% крупногабаритных и 40% малогабаритных строительных конструкций и оборудования:
α := 0.6*α_к + 0.4*α_м = 8.32837
# Допустимое избыточное давление в помещении принимается равным
ΔP_доп := 5  # кПа
# В соответсвии с формулами (14)-(16) коэффициент
β_μ := 1
# Коэффициет Кф, учитывающий влияние формы помещения и эффект истечения продуктов горения взрывоопасной смеси определяется по формуле (16):
К_ф := 0.5*(b_п^2 + h_п^2)/nthroot(V_п^2, 3) = 0.588608
# Требуемая площадь открытых проемов в наружном ограждении взрывоопасного помещения, при которой избыточное давление в нем при взрывном горении ГС не превысит ΔPдоп, определяется по формуле (2):
S_откр.тр := 0.105*U_нр*α*(ε_c - 1)*β_μ*К_ф*sqrt(ρ_0)*nthroot(V_св^2, 3)/sqrt(ΔP_доп) = 55.6615  # м^2
# В качестве ЛСК для снижения избыточного давления взрыва в помещении рассматривается смещаемые сэндвич панели.
# Расчетные размеры сэндвич панелей:
a_пан := 6  # , м
b_пан := 1  # , м
S_ЛСКi := a_пан*b_пан = 6  # ,м^2 - площадь сэндвич панели
# Избыточное давление в помещении, при котором начинается вскрытие ЛСК, определяется из выражения 30 рекомендации.
# Согласно СП 20.13330.2011 расчетная ветровая нагрузка для региона (IV) в котором проводится расчет равна:
p_р.в := 0.48  # кПа
# Согласно каталогу сэндвич панель преставлена толщиной 120мм, длиной 6м, шириной 1м. При такой конфигурации вес данной панели составляет 21 кг/м^2. Таким образом нагрузка от собственной массы вычисляется по формуле:
p_с.м := 21*9.81*10^-3 = 0.20601  # кПа
# При установке сэндвич панелей в боковые ограждающие конструкции расчётная снеговая нагрузка на них равна нулю. Таким образом:
p_сн := 0  # кПа
p_д.н.расч. := 2.5*p_р.в - p_с.м = 0.99399  # кПа
# Согласно формуле 32 рекомендации принимаем с запасом
p_д.н := 1.2  # кПа
# Таким образом избыточное давление при котором начинается вскрытие ЛСК определяется как большее из следующих условий:
Δp_вскр1 := 2  # кПа
Δp_вскр := 3.5*p_р.в + p_д.н = 2.88  # кПа
# Давление начала вскрытия сэндвич панели равно 2.88 кПа
# Видно, что конструкция ЛСК обеспечивает значение Δpвскр не более 0.77ΔPдоп
# По формуле (35) рассчитывается значение коэффициента KΔ:
K_Δ := ΔP_доп/Δp_вскр = 1.73611
# Значение коэффициента формирования взрывной нагрузки на конструкции Kп.в определяется методом линейной интерполяции по табл.6
K_п.в := 1.06
# Рассчитывается критерий Y для расчета коэффициента Kс.м, учитывающего влияние собственной массы ЛСК согласно п.2.16:
M_ЛСК := 126  # ,кг - масса сэндвич панели
Y := Δp_вскр*10^3*S_ЛСКi/(M_ЛСК*9.81) = 13.9799
# При Y >= 0.3 коэффициент Кс.м принимается равным 1
K_с.м := 1
# Согласно п.2.17 Кз.п для смещаемых ЛСК принимается равным 1
K_з.п. := 1
K_вскр := S_откр.тр*(a_пан + b_пан)*Δp_вскр*K_с.м*K_з.п./(K_п.в*α^3*U_нр^3*sqrt(ρ_0)*M_ЛСК) = 1.33149
# Так как Kвскр больше единицы, в конечном итоге Kвскр принимается равным 1
Kвскр := 1
# Площадь ЛСК в наружном ограждении помещения при использовании смещаемых сэндвич панелей  принятого типа будет равна:
S_ЛСКфакт. := S_откр.тр/Kвскр = 55.6615
# Фактическая площадь ЛСК в ограждающих конструкциях должна превышать значение S_ЛСКфакт.
