кДж := 1000*J
кг := kg
сек := s
м := m
с := s
Вт := W
кВт := 1000*W
Б := 1
Нп := 1
Б := 1.15129254651 Нп
Нп := 0.8685889638 Б
дБ := 10 Б
Нп := 8.685889638 дБ
мин := min
ppm := 1
ΔHс := 15800
# Низшая теплота сгорания, кДж/кг
ψуд := 0.015
# Удельная скорость выгорания (для жидкостей - "установившаяся"), кг/(с*м2)
v := 0.0055
# Скорость распространения пламени, м/с
k := 2
# Безразмерный коэффициент, учитывающий отличие фактической площади горючей нагрузки в помещении и площади помещения. Для помещений КФПО Ф1-Ф4 следует принимать равным 2, для помещений класса Ф5.2 с высотой хранений менее 5,5 м - равным 4, для помещений класса Ф5.2 с высотой хранения более 5,5 м - равным отношению фактической поверхности горючих материалов в помещении к площади помещения (но не менее 10).
F := 330
# Площадь помещения очага пожара, м2
B := 6.125
# Ширина помещения, м
b := 6.125
# Ширина той части помещения, которая имеет 3 общие с поверхностью горючей нагрузки грани, м
tmax :=
    if b ≥ B
        k*F/(2*v*b)
    else if b < B
        sqrt(k*F/(π*v^2))
    = 9795.92
# Время охвата пожаром всей поверхности горючей нагрузки в помещении, сек
t := 0 .. tmax = [
    9794; 9795
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]
# Текущее время, сек
t := 300
# Время моделирования, сек
Q :=
    if b ≥ B and t ≤ tmax
        ΔHс*ψуд*2*v*t*b
    else if b < B and t > tmax
        ΔHс*ψуд*2*tmax*b
    = 4790.36
Q :=
    if t ≤ tmax
        ΔHс*ψуд*π*v^2*t^2
    else if t > tmax
        ΔHс*ψуд*π*v^2*tmax^2
    = 2027.06  # disabled
# Зависимость мощности тепловыделения от времени для кругового распространения пожара, кВт/сек
Q :=
    if t ≤ tmax
        ΔHс*ψуд*2*v*t*b
    else if t > tmax
        ΔHс*ψуд*2*tmax*b
    = 4790.36  # disabled
# Зависимость мощности тепловыделения от времени для линейного распространения пожара, кВт/сек
# Пороговые значения параметров, воздействующих на пожарные извещатели (принимаются в соответствии с ТД на извещатели). При отсутствии данных пороговые значения допускается принимать равными:
μпор := 0.023  # Нп/м
μпор := 0.2  # disabled  # дБ/м
# для ТДОЭ
log(0.023, 0.02) = 0.964274  # disabled
0.0088^0.964273742209 = 0.0104212  # disabled
0.0035^0.964273742209 = 0.0042836  # disabled
0.02^0.964273742209 = 0.023  # disabled
Tпор := 37 + 20 + 293 = 350  # для МТ, К
# для МДТ, К
Vtпор := 10 Δ°C/мин  # disabled  # для ДТ, К
μпор := 0.004 Нп/м  # disabled
μпор := 0.035 дБ/м  # disabled  # для ДА класса A
μпор := 0.01 Нп/м  # disabled
μпор := 0.088 дБ/м  # disabled  # для ДА класса B
μпор := 0.023 Нп/м  # disabled
μпор := 0.2 дБ/м  # disabled  # для ДА класса C
μпор := 100 ppm  # disabled  # для Г по концентрации СО
Tпор := 37 °C + 30 Δ°C = 67 °C  # disabled  # для Спринклерной АУПТ
μпор := 5.2 дБ  # disabled  # для ЛД
[μпор; Tпор] := [list choice]  # options: ТДОЭ, МТ, ДТ, ДАA, ДАB, ДАC, Г, САУПТ, ЛД
μпор = 0.023
Tпор = ""
# Определение времени достижения порогового значения срабатывания пожарного извещателя и времени задержки, связанной с инерционностью системы.
T0 := 23.2 + 293
# Температура воздуха в помещении очага пожара, K
H := 2.7
# Высота помещения очага пожара, м
L := x  # error: Эта переменная не определена. Проверьте правильность установки обозначения.
# Максимальное допустимое расстояние между пожарными извещателями (принимается в соответствии с нормативными документами), м
ρ0 := 101
# Начальное атмосферное давление воздуха, кПа
M := 87.014
# Молярная масса, г/моль
g := 9.807
# Ускорение свободного падения, м/с2
cp0 := Q/(M*T0) = 0.174107
# Показатель адиабаты
A := g/(cp0*T0*ρ0) = 0.00176374
# Размерный комплекс, м4/(кДж*с2)
α :=
    if b ≥ B
        ψуд*2*v*b*Q
    else if b < B
        ψуд*π*v^2*Q
    = 4.84126
p :=
    if b ≥ B
        1
    else if b < B
        2
# Параметры a и p для наиболее типичных сценариев пожара имеют значения:
#
# -для вертикальной или горизонтальной поверхности горения в виде прямоугольника при распространении пламени по двум направлениям;
#
# -для кругового распространения пожара.
#
# Размерный коэффициент, кВт/с^p
# Для МТ, ДТ или ДМТ:
L := 4.5
tфр := ((p + 3)/3*(H^4/(A*α))^(1/3)*(0.48 + 1.3*(L/(2*H))^(11/6)))^(3/(p + 3)) = 14.2653
tпор := (((Tпор - T0)*H^(5/3)*(L/(2*H))^(2/3)/(2.04*A^(2/3)*T0/g*α^(2/3)))^((p + 3)/(2*p)) + tфр^((p + 3)/3))^(3/(p + 3))  # error: Значение должно быть скаляром или матрицей.
# Для ТДОЭ, ДА или ЛД:
Dm := 270
# Дымообразующая способность горючей нагрузки, Нп*м2/кг
L := 9.05
η := 0.93
tпор := ((μпор*H^(5/3)*(L/(2*H))^(2/3)/(2.04*A^(-1/3)*Dm/(η*Q)*α^(2/3)))^((p + 3)/(2*p)) + tфр^((p + 3)/3))^(3/(p + 3)) = 14.2663
tинерц := 20
tзадерж := 0
tпредв := 5
tнэ := tпор + tинерц + tзадерж + tпредв float, 3 → 39.3  # для остальных помещений
tр := 95.6
tнэ := tпредв  # для помещения очага пожара
tбл := 148.2
σ0 := 1.5 + 0.01*F = 4.8
K1 := 1
K2 := 1
σ := K1*K2*σ0 float, 5 → 4.8
C := integral(1/(sqrt(2*π)*σ)*e^(-1/2*((t - tр - tнэ)/σ)^2), t = -∞ .. 0)
C = 7.87531e-98
Pэ := integral(1/(sqrt(2*π)*σ*(1 - C))*e^(-1/2*((t - tр - tнэ)/σ)^2), t = 0 .. 0.8*tбл)
Pэ = 0.999909
Pсп := 0.95
tпр := 15
Pпр := tпр/24 = 0.625
Qп := 2.03*10^-2
Rосн := Qп*Pпр*(1 - Pэ)*(1 - Pсп) = 5.79831e-8
# Расчетная величина пожарного риска корректируется по ходу моделирования динамики ОФП и эвакуации, учитывая в том числе вероятность нахождения дверей в открытом и закрытом положении. Если пунктом 29 Методики определена необходимость учета состояния дверного полотна в закрытом и открытом положении и Pпд = 0.3 для вероятности нахождения ПП двери в открытом положении, а Pпд = 0.7 для вероятность нахождения ПП двери в закрытом положении, то вероятности нахождения полотен остальных дверей, в том числе не оборудованных устройствами самозакрывания, на путях эвакуации будут Pд = 0.7 и Pд = 0.3 соответственно.
# Вероятность нахождения ПП двери в открытом положении меньше за счет наличия устройств самозакрывания (доводчиков). Открытая ПП дверь так или иначе вернётся в закрытое положение. Вероятность соответствует эмпирическим данным.
# Вероятность нахождения обычной двери в открытом положении больше за счет отсутствия устройств самозакрывания (доводчиков). Открывшаяся обыкновенная дверь с большей вероятностью останется в открытом положении, с большей вероятностью спровоцирует дискоординацию людских потоков.
R[i] := P[пд]^откр*R[i]^откр + P[пд]^закр*R[i]^закр + P[д]^откр*R[i]^откр + □ .. □ + P[дi]^закр*R[i]^закр  # error: Отсутствует элемент или выражение.
Pпдоткр := 0.3
Pпдзакр := 0.7
Pдоткр := 0.7
Pдзакр := 0.3
Ri := (Pпдоткр*4.568*10^-7 + Pпдзакр*4.568*10^-7) + (Pдоткр*4.568*10^-7 + Pдзакр*4.568*10^-7) + (Pдоткр*4.568*10^-7 + Pдзакр*4.568*10^-7) = 1.3704e-6
# Количество всех сценариев, которые влияют на величину пожарного риска за счет положения полотен дверей, можно найти по формуле:
(a + b)^n
a := 1  # Где а и b - количество ПП дверей и обыкновенных дверей на путях эвакуации соответственно.
b := 2
Rосн := 4.568*10^-7
# Проверка вероятности эвакуации осуществляется путём сопоставления расчётной величины пожарного риска в i-ом сценарии с расчётной величиной пожарного риска в j-ом, где i - сценарий с ПП дверями и j - сценарий без ПП дверей.
Pд(Rосн) := ((Pпдоткр*Pпдзакр)^a + (Pдоткр*Pдзакр)^b)^(Rосн^(1/(a*b)))
Pд(Rосн) = 0.999074
Ri := Pд(Rосн)*Rосн = 4.56377e-7
# Расчетная величина пожарного риска корректируется по ходу моделирования динамики ОФП и эвакуации, учитывая в том числе вероятность нахождения дверных полотен в открытом и закрытом положении. Если пунктом 29 методики определена необходимость учета состояния дверного полотна в закрытом и открытом положении и Pпд = 0.3 для вероятности нахождения ПП двери в открытом положении, а Pпд = 0.7 для вероятность  нахождения ПП двери в закрытом положении, то вероятности нахождения полотен остальных дверей на путях эвакуации будут Pд = 0.7 и Pд = 0.3 соответственно.
# Вероятность нахождения ПП двери в открытом состоянии меньше за счет наличия устройств самозакрывания (доводчиков). Открытая ПП дверь так или иначе вернётся в закрытое состояние. Вероятность соответствует эмпирическому анализу.
# Вероятность нахождения обычной двери в открытом состоянии больше за счет отсутствия устройств самозакрывания (доводчиков). Открывшаяся обыкновенная дверь с большей вероятностью останется в открытом положении, провоцируя деформации людских потоков на путях эвакуации с большей вероятностью.
Pдоткр := 0.7
Pдзакр := 0.3
R[i] := P[пд]^откр*Rосн[i]^откр + P[пд]^закр*Rосн[i]^закр  # error: Эта переменная не определена. Проверьте правильность установки обозначения.
i := 3  # количество обыкновенных дверей на путях эвакуации
R[i] := sum(Pдоткр*Rосн + Pдзакр*Rосн)  # error: Эта матрица должна содержать скалярные элементы, имеющие одинаковые единицы измерения.
d(t) := t^2 + 2^sqrt(2)*t
t := 0 .. 10
# [plot: d(t) vs t]
v(t) := d/dt(d(t))
# [plot: v(t) vs t]
a(t) := d^2/dt^2(d(t))
# [plot: a(t) vs t]
ORIGIN := 1
a := 2.6
n := 1 .. 15
x[n] := 0.4
x[n + 1] := a*x[n]*(1 - x[n]) = [0.624; 0.610022; 0.618527; 0.613473; 0.616522; 0.614699; 0.615795; 0.615138; 0.615532; 0.615296; 0.615438; 0.615353; 0.615404; 0.615373; 0.615392]
# [plot: x[n + 1] vs n]
f(x) := x*f(x)
# [plot: f(x) vs x*f(x)]
