a_п := 24  # Длина помещения, м
b_п := 11.75  # Ширина помещения, м
h_п := 7.7  # Высота помещения, м
# Геометрический объем помещения Vп равен:
V_п := 2170.6  # Объем помещения, м^3
# Согласно примечанию 2 и 4 к табл.1 принимается, что строительные конструкции и оборудование занимают 20% геометрического объема помещения, причем 60% занимают крупногабаритные строительные конструкции и оборудование, а 40% - малогабаритные
# Свободный объём помещения Vсв рассчитывается по формуле:
V_св := V_п*(1 - 0.01*20) = 1736.48  # Свободный объем помещения, м^3
# В помещении в аварийной ситуации может образовываться пропановоздушная горючая смесь. Давление и температура в помещении до воспламенения горючей смеси принимаются равными
p_0 := 101.3  # Начальное давление, кПа
T_0 := 20  # Начальная температура, С
# Коэффициент степени заполнения объема помещения горючей смесью и участия ее во взрыве
μ_v := 1
# Характеристики горючей смеси принимаются по данными таблици прил. 2:
ε_pmax := 8.1
U_нmax := 0.45  # м/с
ρ_НКПР := 1.2  # кг/м^3
ε_рнкпр := 5.1
ρ_max := 1.21  # кг/м^3
ε_снкпр := 6.1  # степень сжатия продуктов горения  при взрыве в замкнутом объеме с концентрацией горючего, соответсвующей НКПР
ε_cmax := 9.7  # степень сжатия продуктов горения при взрыве в замкнутом объеме с концентрацией горючего, соответсвующей Uнmax
# Расчетные характеристики ГС вычисляются по соотвествующим формулам.
# Расчетная нормальная скорость распростанения пламени определяется по формуле:
U_нр := U_нmax*0.55 = 0.2475  # м/с
# Расчетная плотность газа в помещении перед воспламенением смеси определяется по формуле:
ρ_0 := (0.5367*μ_v*(ρ_НКПР + ρ_max) + (1 - μ_v)*1.294)/(1 + 0.00367*T_0) = 1.205  # кг/м^3
# Расчетная степень сжатия продуктов горения при взрыве в замкнутом объеме определяется по формуле:
ε_c := 0.5*(ε_cmax + ε_снкпр) = 7.9
# Исходя из условий (10)-(12) опредеяем, что
V_пл := 0.5*μ_v*V_п*(ε_рнкпр + ε_pmax) = 14326  # объем пламени, м^3
# Так как Vпл > Vп, значит V=Vп
V := 2170.6  # м^3
# Показатель интенсификации взрывного горения α определяется линейной интерполяцией по табл. 1 в зависимости от степени загроможденности помещения строительными конструкциями и оборудованием Θз и объема V, в котором происходить горение взрывоопасной смеси.
# Для малогабаритных строительных конструкций и оборудования при Θз=20%
α_м := 10 + (18 - 10)*(2170.6 - 1000)/(10000 - 1000) = 11.0405
# Для крупногабаритных строительных конструкций и оборудования при Θз=20%
α_к := 6 + (10 - 6)*(2170.6 - 1000)/(10000 - 1000) = 6.52027
# Для 60% крупногабаритных и 40% малогабаритных строительных конструкций и оборудования:
α := 0.6*α_к + 0.4*α_м = 8.32837
# Допустимое избыточное давление в помещении принимается равным
ΔP_доп := 5  # кПа
# В соответсвии с формулами (14)-(16) коэффициент
β_μ := 1
# Коэффициет Кф, учитывающий влияние формы помещения и эффект истечения продуктов горения взрывоопасной смеси определяется по формуле (16):
К_ф := 0.5*(b_п^2 + h_п^2)/nthroot(V_п^2, 3) = 0.588608
# Требуемая площадь открытых проемов в наружном ограждении взрывоопасного помещения, при которой избыточное давление в нем при взрывном горении ГС не превысит ΔPдоп, определяется по формуле (2):
S_откр.тр := 0.105*U_нр*α*(ε_c - 1)*β_μ*К_ф*sqrt(ρ_0)*nthroot(V_св^2, 3)/sqrt(ΔP_доп) = 62.3431  # м^2
# В качестве ЛСК для снижения избыточного давления взрыва в помещении рассматривается оконный проёмы, показанные на рис.2.
# Принимается, что для застекления оконных проёмов используется стекло толщиной 3мм. Остекление одинарное
# Расчетные размеры стекол рассчитываются по следующим формулам:
a_ст := 1 + 3*0.003 = 1.009  # , м
b_ст := 1.75 + 3*0.003 = 1.759  # , м
# Площадь стекла рассчитывается по следующией формуле:
S_ст := a_ст*b_ст = 1.77483  # , м^2
# Коэффициент λст рассчитывается по следующей формуле:
λ_ст := a_ст/b_ст = 0.573621
# Коэффициенты Ksh и Kλ расчитываются линейной интерполяцией с помощью табл.4 и табл.5 рекомендации расчет параметров легкосбрасываемых конструкций.
K_sh := 0.255 + ((0.235 - 0.255)*(1.775 - 1.6)/(1.8 - 1.6)) = 0.2375
K_λ := 1.04 + ((1.01 - 1.04)*(0.574 - 0.5)/(0.6 - 0.5)) = 1.0178
# Значение приведенного давления вскрытия оконного остекления ΔPдоп рассчитывается по формуле:
ΔP_доп := 5  # , кПа
ΔP_доп.прив. := ΔP_доп/(K_sh*K_λ) = 20.6844
# Так как значение приведённого давления больше чем 20 кПа, коэффициент вскрытия принимается равным 0.94
K_вскр1ост. := 0.94
# Таким образом, площадь ЛСК в наружном ограждении помещения определяется по следующей формуле:
S_ЛСК := S_откр.тр/K_вскр1ост. = 66.3224  # , м^2
# Фактическая площадь ЛСК должна быть больше, чем значение Sлск.
